<?xml version="1.0"?>

<propeller name="Fixed-Pitch blabla-inch Two-Blade Propeller">
      <ixx> 1.027 </ixx>
      <!--
      MoI ~ 0.5 * Prop_Weight(lb) (less hub) * [D2]/386
      w=24lb
      d=69inch=5.75ft
      MoI ~ 1.027
      -->
      <diameter unit="IN"> 68.9 </diameter>
      <numblades> 2 </numblades>
      <minpitch> 30 </minpitch>
      <maxpitch> 30 </maxpitch>
      <gearratio> 1.00 </gearratio>
      <ct_factor> 2.00 </ct_factor>
      <cp_factor> 2.00 </cp_factor>

      <table name="C_THRUST" type="internal">
         <tableData>
           0.0  0.0197
           0.1  0.0189
           0.2  0.0181
           0.3  0.0167
           0.4  0.0150
           0.5  0.0132
           0.6  0.0107
           0.7  0.0081
           0.8  0.0044
           1.0  -0.0015
           1.2  -0.0173
           1.4  -0.0140
           1.6  -0.0202
         </tableData>
      </table>

      <table name="C_POWER" type="internal">
         <tableData>
           0.0  0.0229
           0.1  0.0229
           0.2  0.0224
           0.3  0.0219
           0.4  0.0206
           0.5  0.0189
           0.6  0.0173
           0.7  0.0145
           0.8  0.0119
           1.0  -0.0042
           1.2  -0.0186
           1.4  -0.0408
           1.6  -0.0694
         </tableData>
      </table>

</propeller>
